// SBML level 2 version 3

model mESC_generatingSBML()

  // Compartments:
  compartment cell = 1;

  // Species:
  species STAT3_b_b_nA_0_nR_0 in cell = 1; STAT3_b_b_nA_0_nR_0 is "STAT3(b,b,nA~0,nR~0)";
  species GBX2_b_b_nA_0_nR_0 in cell = 1; GBX2_b_b_nA_0_nR_0 is "GBX2(b,b,nA~0,nR~0)";
  species KLF4_b_b_nA_0_nR_0 in cell = 1; KLF4_b_b_nA_0_nR_0 is "KLF4(b,b,nA~0,nR~0)";
  species KLF2_b_b_nA_0_nR_0 in cell = 1; KLF2_b_b_nA_0_nR_0 is "KLF2(b,b,nA~0,nR~0)";
  species SALL4_b_b_nA_0_nR_0 in cell = 1; SALL4_b_b_nA_0_nR_0 is "SALL4(b,b,nA~0,nR~0)";
  species OCT4_b_b_nA_0_nR_0 in cell = 1; OCT4_b_b_nA_0_nR_0 is "OCT4(b,b,nA~0,nR~0)";
  species SOX2_b_b_nA_0_nR_0 in cell = 1; SOX2_b_b_nA_0_nR_0 is "SOX2(b,b,nA~0,nR~0)";
  species NANOG_b_b_nA_0_nR_0 in cell = 1; NANOG_b_b_nA_0_nR_0 is "NANOG(b,b,nA~0,nR~0)";
  species ESRRB_b_b_nA_0_nR_0 in cell = 1; ESRRB_b_b_nA_0_nR_0 is "ESRRB(b,b,nA~0,nR~0)";
  species TFCP2L1_b_b_nA_0_nR_0 in cell = 1; TFCP2L1_b_b_nA_0_nR_0 is "TFCP2L1(b,b,nA~0,nR~0)";
  species TCF3_b_b_nA_0_nR_0 in cell = 1; TCF3_b_b_nA_0_nR_0 is "TCF3(b,b,nA~0,nR~0)";
  species MEKERK_b_b_nA_0_nR_0 in cell = 1; MEKERK_b_b_nA_0_nR_0 is "MEKERK(b,b,nA~0,nR~0)";
  species stat3_s in cell = 0; stat3_s is "stat3(s)";
  species gbx2_s in cell = 0; gbx2_s is "gbx2(s)";
  species klf4_s in cell = 0; klf4_s is "klf4(s)";
  species klf2_s in cell = 0; klf2_s is "klf2(s)";
  species sall4_s in cell = 0; sall4_s is "sall4(s)";
  species oct4_s in cell = 0; oct4_s is "oct4(s)";
  species sox2_s in cell = 0; sox2_s is "sox2(s)";
  species nanog_s in cell = 0; nanog_s is "nanog(s)";
  species esrrb_s in cell = 0; esrrb_s is "esrrb(s)";
  species tfcp2l1_s in cell = 0; tfcp2l1_s is "tfcp2l1(s)";
  species tcf3_s in cell = 0; tcf3_s is "tcf3(s)";
  species mekerk_s in cell = 0; mekerk_s is "mekerk(s)";
  species lif_s in cell = 0; lif_s is "lif(s)";
  species ch_s in cell = 0; ch_s is "ch(s)";
  species pd_s in cell = 0; pd_s is "pd(s)";
  species STAT3_b_1_b_nA_1_nR_0_lif_s_1 in cell = 0; STAT3_b_1_b_nA_1_nR_0_lif_s_1 is "STAT3(b!1,b,nA~1,nR~0).lif(s!1)";
  species TCF3_b_1_b_nA_0_nR_1_ch_s_1 in cell = 0; TCF3_b_1_b_nA_0_nR_1_ch_s_1 is "TCF3(b!1,b,nA~0,nR~1).ch(s!1)";
  species MEKERK_b_1_b_nA_0_nR_1_pd_s_1 in cell = 0; MEKERK_b_1_b_nA_0_nR_1_pd_s_1 is "MEKERK(b!1,b,nA~0,nR~1).pd(s!1)";
  species GBX2_b_1_b_nA_1_nR_0_stat3_s_1 in cell = 0; GBX2_b_1_b_nA_1_nR_0_stat3_s_1 is "GBX2(b!1,b,nA~1,nR~0).stat3(s!1)";
  species KLF4_b_1_b_nA_1_nR_0_stat3_s_1 in cell = 0; KLF4_b_1_b_nA_1_nR_0_stat3_s_1 is "KLF4(b!1,b,nA~1,nR~0).stat3(s!1)";
  species S33 in cell = 0; S33 is "TFCP2L1(b!1,b,nA~1,nR~0).stat3(s!1)";
  species KLF4_b_1_b_nA_1_nR_0_gbx2_s_1 in cell = 0; KLF4_b_1_b_nA_1_nR_0_gbx2_s_1 is "KLF4(b!1,b,nA~1,nR~0).gbx2(s!1)";
  species KLF2_b_1_b_nA_1_nR_0_klf4_s_1 in cell = 0; KLF2_b_1_b_nA_1_nR_0_klf4_s_1 is "KLF2(b!1,b,nA~1,nR~0).klf4(s!1)";
  species S36 in cell = 0; S36 is "SALL4(b!1,b,nA~1,nR~0).tfcp2l1(s!1)";
  species KLF2_b_1_b_nA_1_nR_0_sall4_s_1 in cell = 0; KLF2_b_1_b_nA_1_nR_0_sall4_s_1 is "KLF2(b!1,b,nA~1,nR~0).sall4(s!1)";
  species OCT4_b_1_b_nA_1_nR_0_klf2_s_1 in cell = 0; OCT4_b_1_b_nA_1_nR_0_klf2_s_1 is "OCT4(b!1,b,nA~1,nR~0).klf2(s!1)";
  species TFCP2L1_b_1_b_nA_1_nR_0_klf4_s_1 in cell = 0; TFCP2L1_b_1_b_nA_1_nR_0_klf4_s_1 is "TFCP2L1(b!1,b,nA~1,nR~0).klf4(s!1)";
  species NANOG_b_1_b_nA_1_nR_0_klf2_s_1 in cell = 0; NANOG_b_1_b_nA_1_nR_0_klf2_s_1 is "NANOG(b!1,b,nA~1,nR~0).klf2(s!1)";
  species SOX2_b_1_b_nA_1_nR_0_sall4_s_1 in cell = 0; SOX2_b_1_b_nA_1_nR_0_sall4_s_1 is "SOX2(b!1,b,nA~1,nR~0).sall4(s!1)";
  species OCT4_b_1_b_nA_1_nR_0_sox2_s_1 in cell = 0; OCT4_b_1_b_nA_1_nR_0_sox2_s_1 is "OCT4(b!1,b,nA~1,nR~0).sox2(s!1)";
  species NANOG_b_1_b_nA_1_nR_0_oct4_s_1 in cell = 0; NANOG_b_1_b_nA_1_nR_0_oct4_s_1 is "NANOG(b!1,b,nA~1,nR~0).oct4(s!1)";
  species ESRRB_b_1_b_nA_1_nR_0_nanog_s_1 in cell = 0; ESRRB_b_1_b_nA_1_nR_0_nanog_s_1 is "ESRRB(b!1,b,nA~1,nR~0).nanog(s!1)";
  species SOX2_b_1_b_nA_1_nR_0_nanog_s_1 in cell = 0; SOX2_b_1_b_nA_1_nR_0_nanog_s_1 is "SOX2(b!1,b,nA~1,nR~0).nanog(s!1)";
  species S46 in cell = 0; S46 is "ESRRB(b!1,b,nA~1,nR~0).tfcp2l1(s!1)";
  species TCF3_b_1_b_nA_0_nR_1_mekerk_s_1 in cell = 0; TCF3_b_1_b_nA_0_nR_1_mekerk_s_1 is "TCF3(b!1,b,nA~0,nR~1).mekerk(s!1)";
  species NANOG_b_1_b_nA_0_nR_1_mekerk_s_1 in cell = 0; NANOG_b_1_b_nA_0_nR_1_mekerk_s_1 is "NANOG(b!1,b,nA~0,nR~1).mekerk(s!1)";
  species TFCP2L1_b_1_b_nA_0_nR_1_tcf3_s_1 in cell = 0; TFCP2L1_b_1_b_nA_0_nR_1_tcf3_s_1 is "TFCP2L1(b!1,b,nA~0,nR~1).tcf3(s!1)";
  species ESRRB_b_1_b_nA_0_nR_1_tcf3_s_1 in cell = 0; ESRRB_b_1_b_nA_0_nR_1_tcf3_s_1 is "ESRRB(b!1,b,nA~0,nR~1).tcf3(s!1)";
  species OCT4_b_1_b_nA_0_nR_1_esrrb_s_1 in cell = 0; OCT4_b_1_b_nA_0_nR_1_esrrb_s_1 is "OCT4(b!1,b,nA~0,nR~1).esrrb(s!1)";
  species TFCP2L1_b_1_b_nA_0_nR_1_oct4_s_1 in cell = 0; TFCP2L1_b_1_b_nA_0_nR_1_oct4_s_1 is "TFCP2L1(b!1,b,nA~0,nR~1).oct4(s!1)";
  species S53 in cell = 0; S53 is "STAT3(b!1,b!2,nA~2,nR~0).lif(s!2).lif(s!1)";
  species S54 in cell = 0; S54 is "TCF3(b!1,b!2,nA~0,nR~2).ch(s!2).ch(s!1)";
  species S55 in cell = 0; S55 is "TCF3(b!1,b!2,nA~0,nR~2).ch(s!2).mekerk(s!1)";
  species S56 in cell = 0; S56 is "MEKERK(b!1,b!2,nA~0,nR~2).pd(s!2).pd(s!1)";
  species S57 in cell = 0; S57 is "GBX2(b!1,b!2,nA~2,nR~0).stat3(s!2).stat3(s!1)";
  species S58 in cell = 0; S58 is "KLF4(b!1,b!2,nA~2,nR~0).stat3(s!2).stat3(s!1)";
  species S59 in cell = 0; S59 is "KLF4(b!1,b!2,nA~2,nR~0).gbx2(s!1).stat3(s!2)";
  species S60 in cell = 0; S60 is "TFCP2L1(b!1,b!2,nA~1,nR~1).stat3(s!2).tcf3(s!1)";
  species S61 in cell = 0; S61 is "TFCP2L1(b!1,b!2,nA~1,nR~1).oct4(s!1).stat3(s!2)";
  species S62 in cell = 0; S62 is "TFCP2L1(b!1,b!2,nA~2,nR~0).stat3(s!2).stat3(s!1)";
  species S63 in cell = 0; S63 is "TFCP2L1(b!1,b!2,nA~2,nR~0).klf4(s!1).stat3(s!2)";
  species S64 in cell = 0; S64 is "KLF4(b!1,b!2,nA~2,nR~0).gbx2(s!2).gbx2(s!1)";
  species S65 in cell = 0; S65 is "KLF2(b!1,b!2,nA~2,nR~0).klf4(s!2).klf4(s!1)";
  species S66 in cell = 0; S66 is "KLF2(b!1,b!2,nA~2,nR~0).klf4(s!2).sall4(s!1)";
  species S67 in cell = 0; S67 is "SALL4(b!1,b!2,nA~2,nR~0).tfcp2l1(s!2).tfcp2l1(s!1)";
  species S68 in cell = 0; S68 is "KLF2(b!1,b!2,nA~2,nR~0).sall4(s!2).sall4(s!1)";
  species S69 in cell = 0; S69 is "OCT4(b!1,b!2,nA~1,nR~1).esrrb(s!1).klf2(s!2)";
  species S70 in cell = 0; S70 is "OCT4(b!1,b!2,nA~2,nR~0).klf2(s!2).klf2(s!1)";
  species S71 in cell = 0; S71 is "OCT4(b!1,b!2,nA~2,nR~0).klf2(s!2).sox2(s!1)";
  species S72 in cell = 0; S72 is "TFCP2L1(b!1,b!2,nA~1,nR~1).klf4(s!2).tcf3(s!1)";
  species S73 in cell = 0; S73 is "TFCP2L1(b!1,b!2,nA~1,nR~1).klf4(s!2).oct4(s!1)";
  species S74 in cell = 0; S74 is "TFCP2L1(b!1,b!2,nA~2,nR~0).klf4(s!2).klf4(s!1)";
  species S75 in cell = 0; S75 is "NANOG(b!1,b!2,nA~1,nR~1).klf2(s!2).mekerk(s!1)";
  species S76 in cell = 0; S76 is "NANOG(b!1,b!2,nA~2,nR~0).klf2(s!2).klf2(s!1)";
  species S77 in cell = 0; S77 is "NANOG(b!1,b!2,nA~2,nR~0).klf2(s!2).oct4(s!1)";
  species S78 in cell = 0; S78 is "SOX2(b!1,b!2,nA~2,nR~0).sall4(s!2).sall4(s!1)";
  species S79 in cell = 0; S79 is "SOX2(b!1,b!2,nA~2,nR~0).nanog(s!1).sall4(s!2)";
  species S80 in cell = 0; S80 is "OCT4(b!1,b!2,nA~1,nR~1).esrrb(s!1).sox2(s!2)";
  species S81 in cell = 0; S81 is "OCT4(b!1,b!2,nA~2,nR~0).sox2(s!2).sox2(s!1)";
  species S82 in cell = 0; S82 is "NANOG(b!1,b!2,nA~1,nR~1).mekerk(s!1).oct4(s!2)";
  species S83 in cell = 0; S83 is "NANOG(b!1,b!2,nA~2,nR~0).oct4(s!2).oct4(s!1)";
  species S84 in cell = 0; S84 is "ESRRB(b!1,b!2,nA~1,nR~1).nanog(s!2).tcf3(s!1)";
  species S85 in cell = 0; S85 is "ESRRB(b!1,b!2,nA~2,nR~0).nanog(s!2).nanog(s!1)";
  species S86 in cell = 0; S86 is "ESRRB(b!1,b!2,nA~2,nR~0).nanog(s!2).tfcp2l1(s!1)";
  species S87 in cell = 0; S87 is "SOX2(b!1,b!2,nA~2,nR~0).nanog(s!2).nanog(s!1)";
  species S88 in cell = 0; S88 is "ESRRB(b!1,b!2,nA~1,nR~1).tcf3(s!1).tfcp2l1(s!2)";
  species S89 in cell = 0; S89 is "ESRRB(b!1,b!2,nA~2,nR~0).tfcp2l1(s!2).tfcp2l1(s!1)";
  species S90 in cell = 0; S90 is "TCF3(b!1,b!2,nA~0,nR~2).mekerk(s!2).mekerk(s!1)";
  species S91 in cell = 0; S91 is "NANOG(b!1,b!2,nA~0,nR~2).mekerk(s!2).mekerk(s!1)";
  species S92 in cell = 0; S92 is "TFCP2L1(b!1,b!2,nA~0,nR~2).tcf3(s!2).tcf3(s!1)";
  species S93 in cell = 0; S93 is "TFCP2L1(b!1,b!2,nA~0,nR~2).oct4(s!1).tcf3(s!2)";
  species S94 in cell = 0; S94 is "ESRRB(b!1,b!2,nA~0,nR~2).tcf3(s!2).tcf3(s!1)";
  species S95 in cell = 0; S95 is "OCT4(b!1,b!2,nA~0,nR~2).esrrb(s!2).esrrb(s!1)";
  species S96 in cell = 0; S96 is "TFCP2L1(b!1,b!2,nA~0,nR~2).oct4(s!2).oct4(s!1)";

  // Parameters:
  Omega = 10000;
  gamma = 1;
  LIF = 10000;
  CH = 10000;
  PD = 10000;
  kon = 16;
  koff = 1.5;
  alphamax = 1;
  alpham = 0.01;
  _rateLaw1 = 0;
  _rateLaw2 = 0;
  _rateLaw3 = 0;
  _rateLaw4 = 0;
  _rateLaw5 = 0;
  _rateLaw6 = 0;
  _rateLaw7 = 0;
  _rateLaw8 = 0;
  _rateLaw9 = 0;
  _rateLaw10 = 0;
  _rateLaw11 = 0;
  _rateLaw12 = 0;
  _rateLaw13 = 0;
  _rateLaw14 = 0;
  _rateLaw15 = 0;
  _rateLaw16 = 0;
  _rateLaw17 = 0;
  _rateLaw18 = 0;
  konIB = kon/Omega;
  koffIB = koff;
  alphamIB = alpham*Omega;
  alphamaxIB = alphamax*Omega;
  LIFIB = LIF*Omega;
  CHIB = CH*Omega;
  PDIB = PD*Omega;

  // Assignment rules:
  lif := 0 + lif_s;
  ch := 0 + ch_s;
  pd := 0 + pd_s;
  stat3 := 0 + stat3_s;
  gbx2 := 0 + gbx2_s;
  klf4 := 0 + klf4_s;
  klf2 := 0 + klf2_s;
  sall4 := 0 + sall4_s;
  oct4 := 0 + oct4_s;
  sox2 := 0 + sox2_s;
  nanog := 0 + nanog_s;
  esrrb := 0 + esrrb_s;
  tfcp2l1 := 0 + tfcp2l1_s;
  tcf3 := 0 + tcf3_s;
  mekerk := 0 + mekerk_s;

  // Reactions:
  R1: => lif_s; LIFIB;
  R2: lif_s => ; gamma*lif_s;
  R3: => ch_s; CHIB;
  R4: ch_s => ; gamma*ch_s;
  R5: => pd_s; PDIB;
  R6: pd_s => ; gamma*pd_s;
  R7: STAT3_b_b_nA_0_nR_0 + lif_s => STAT3_b_1_b_nA_1_nR_0_lif_s_1; 2*konIB*STAT3_b_b_nA_0_nR_0*lif_s;
  R8: TCF3_b_b_nA_0_nR_0 + ch_s => TCF3_b_1_b_nA_0_nR_1_ch_s_1; 2*konIB*TCF3_b_b_nA_0_nR_0*ch_s;
  R9: MEKERK_b_b_nA_0_nR_0 + pd_s => MEKERK_b_1_b_nA_0_nR_1_pd_s_1; 2*konIB*MEKERK_b_b_nA_0_nR_0*pd_s;
  R10: GBX2_b_b_nA_0_nR_0 + stat3_s => GBX2_b_1_b_nA_1_nR_0_stat3_s_1; 2*konIB*GBX2_b_b_nA_0_nR_0*stat3_s;
  R11: KLF4_b_b_nA_0_nR_0 + stat3_s => KLF4_b_1_b_nA_1_nR_0_stat3_s_1; 2*konIB*KLF4_b_b_nA_0_nR_0*stat3_s;
  R12: TFCP2L1_b_b_nA_0_nR_0 + stat3_s => S33; 2*konIB*TFCP2L1_b_b_nA_0_nR_0*stat3_s;
  R13: KLF4_b_b_nA_0_nR_0 + gbx2_s => KLF4_b_1_b_nA_1_nR_0_gbx2_s_1; 2*konIB*KLF4_b_b_nA_0_nR_0*gbx2_s;
  R14: KLF2_b_b_nA_0_nR_0 + klf4_s => KLF2_b_1_b_nA_1_nR_0_klf4_s_1; 2*konIB*KLF2_b_b_nA_0_nR_0*klf4_s;
  R15: SALL4_b_b_nA_0_nR_0 + tfcp2l1_s => S36; 2*konIB*SALL4_b_b_nA_0_nR_0*tfcp2l1_s;
  R16: KLF2_b_b_nA_0_nR_0 + sall4_s => KLF2_b_1_b_nA_1_nR_0_sall4_s_1; 2*konIB*KLF2_b_b_nA_0_nR_0*sall4_s;
  R17: OCT4_b_b_nA_0_nR_0 + klf2_s => OCT4_b_1_b_nA_1_nR_0_klf2_s_1; 2*konIB*OCT4_b_b_nA_0_nR_0*klf2_s;
  R18: TFCP2L1_b_b_nA_0_nR_0 + klf4_s => TFCP2L1_b_1_b_nA_1_nR_0_klf4_s_1; 2*konIB*TFCP2L1_b_b_nA_0_nR_0*klf4_s;
  R19: NANOG_b_b_nA_0_nR_0 + klf2_s => NANOG_b_1_b_nA_1_nR_0_klf2_s_1; 2*konIB*NANOG_b_b_nA_0_nR_0*klf2_s;
  R20: SOX2_b_b_nA_0_nR_0 + sall4_s => SOX2_b_1_b_nA_1_nR_0_sall4_s_1; 2*konIB*SOX2_b_b_nA_0_nR_0*sall4_s;
  R21: OCT4_b_b_nA_0_nR_0 + sox2_s => OCT4_b_1_b_nA_1_nR_0_sox2_s_1; 2*konIB*OCT4_b_b_nA_0_nR_0*sox2_s;
  R22: NANOG_b_b_nA_0_nR_0 + oct4_s => NANOG_b_1_b_nA_1_nR_0_oct4_s_1; 2*konIB*NANOG_b_b_nA_0_nR_0*oct4_s;
  R23: ESRRB_b_b_nA_0_nR_0 + nanog_s => ESRRB_b_1_b_nA_1_nR_0_nanog_s_1; 2*konIB*ESRRB_b_b_nA_0_nR_0*nanog_s;
  R24: SOX2_b_b_nA_0_nR_0 + nanog_s => SOX2_b_1_b_nA_1_nR_0_nanog_s_1; 2*konIB*SOX2_b_b_nA_0_nR_0*nanog_s;
  R25: TFCP2L1_b_b_nA_0_nR_0 + esrrb_s => S33; 2*konIB*TFCP2L1_b_b_nA_0_nR_0*esrrb_s;
  R26: ESRRB_b_b_nA_0_nR_0 + tfcp2l1_s => S46; 2*konIB*ESRRB_b_b_nA_0_nR_0*tfcp2l1_s;
  R27: TCF3_b_b_nA_0_nR_0 + mekerk_s => TCF3_b_1_b_nA_0_nR_1_mekerk_s_1; 2*konIB*TCF3_b_b_nA_0_nR_0*mekerk_s;
  R28: NANOG_b_b_nA_0_nR_0 + mekerk_s => NANOG_b_1_b_nA_0_nR_1_mekerk_s_1; 2*konIB*NANOG_b_b_nA_0_nR_0*mekerk_s;
  R29: TFCP2L1_b_b_nA_0_nR_0 + tcf3_s => TFCP2L1_b_1_b_nA_0_nR_1_tcf3_s_1; 2*konIB*TFCP2L1_b_b_nA_0_nR_0*tcf3_s;
  R30: ESRRB_b_b_nA_0_nR_0 + tcf3_s => ESRRB_b_1_b_nA_0_nR_1_tcf3_s_1; 2*konIB*ESRRB_b_b_nA_0_nR_0*tcf3_s;
  R31: OCT4_b_b_nA_0_nR_0 + esrrb_s => OCT4_b_1_b_nA_0_nR_1_esrrb_s_1; 2*konIB*OCT4_b_b_nA_0_nR_0*esrrb_s;
  R32: TFCP2L1_b_b_nA_0_nR_0 + oct4_s => TFCP2L1_b_1_b_nA_0_nR_1_oct4_s_1; 2*konIB*TFCP2L1_b_b_nA_0_nR_0*oct4_s;
  R33: STAT3_b_b_nA_0_nR_0 => STAT3_b_b_nA_0_nR_0 + stat3_s; _rateLaw2*STAT3_b_b_nA_0_nR_0;
  R34: GBX2_b_b_nA_0_nR_0 => GBX2_b_b_nA_0_nR_0 + gbx2_s; _rateLaw4*GBX2_b_b_nA_0_nR_0;
  R35: KLF4_b_b_nA_0_nR_0 => KLF4_b_b_nA_0_nR_0 + klf4_s; _rateLaw6*KLF4_b_b_nA_0_nR_0;
  R36: KLF2_b_b_nA_0_nR_0 => KLF2_b_b_nA_0_nR_0 + klf2_s; _rateLaw8*KLF2_b_b_nA_0_nR_0;
  R37: SALL4_b_b_nA_0_nR_0 => SALL4_b_b_nA_0_nR_0 + sall4_s; _rateLaw10*SALL4_b_b_nA_0_nR_0;
  R38: SOX2_b_b_nA_0_nR_0 => SOX2_b_b_nA_0_nR_0 + sox2_s; _rateLaw12*SOX2_b_b_nA_0_nR_0;
  R39: TCF3_b_b_nA_0_nR_0 => TCF3_b_b_nA_0_nR_0 + tcf3_s; alphamaxIB*TCF3_b_b_nA_0_nR_0;
  R40: MEKERK_b_b_nA_0_nR_0 => MEKERK_b_b_nA_0_nR_0 + mekerk_s; alphamaxIB*MEKERK_b_b_nA_0_nR_0;
  R41: OCT4_b_b_nA_0_nR_0 => OCT4_b_b_nA_0_nR_0 + oct4_s; alphamIB*OCT4_b_b_nA_0_nR_0;
  R42: TFCP2L1_b_b_nA_0_nR_0 => TFCP2L1_b_b_nA_0_nR_0 + tfcp2l1_s; alphamIB*TFCP2L1_b_b_nA_0_nR_0;
  R43: ESRRB_b_b_nA_0_nR_0 => ESRRB_b_b_nA_0_nR_0 + esrrb_s; alphamIB*ESRRB_b_b_nA_0_nR_0;
  R44: NANOG_b_b_nA_0_nR_0 => NANOG_b_b_nA_0_nR_0 + nanog_s; alphamIB*NANOG_b_b_nA_0_nR_0;
  R45: stat3_s => ; gamma*stat3_s;
  R46: gbx2_s => ; gamma*gbx2_s;
  R47: klf4_s => ; gamma*klf4_s;
  R48: klf2_s => ; gamma*klf2_s;
  R49: sall4_s => ; gamma*sall4_s;
  R50: oct4_s => ; gamma*oct4_s;
  R51: sox2_s => ; gamma*sox2_s;
  R52: nanog_s => ; gamma*nanog_s;
  R53: esrrb_s => ; gamma*esrrb_s;
  R54: tfcp2l1_s => ; gamma*tfcp2l1_s;
  R55: tcf3_s => ; gamma*tcf3_s;
  R56: mekerk_s => ; gamma*mekerk_s;
  R57: STAT3_b_1_b_nA_1_nR_0_lif_s_1 => STAT3_b_b_nA_0_nR_0 + lif_s; koffIB*STAT3_b_1_b_nA_1_nR_0_lif_s_1;
  R58: lif_s + STAT3_b_1_b_nA_1_nR_0_lif_s_1 => S53; konIB*lif_s*STAT3_b_1_b_nA_1_nR_0_lif_s_1;
  R59: TCF3_b_1_b_nA_0_nR_1_ch_s_1 => TCF3_b_b_nA_0_nR_0 + ch_s; koffIB*TCF3_b_1_b_nA_0_nR_1_ch_s_1;
  R60: ch_s + TCF3_b_1_b_nA_0_nR_1_ch_s_1 => S54; konIB*ch_s*TCF3_b_1_b_nA_0_nR_1_ch_s_1;
  R61: ch_s + TCF3_b_1_b_nA_0_nR_1_mekerk_s_1 => S55; konIB*ch_s*TCF3_b_1_b_nA_0_nR_1_mekerk_s_1;
  R62: MEKERK_b_1_b_nA_0_nR_1_pd_s_1 => MEKERK_b_b_nA_0_nR_0 + pd_s; koffIB*MEKERK_b_1_b_nA_0_nR_1_pd_s_1;
  R63: pd_s + MEKERK_b_1_b_nA_0_nR_1_pd_s_1 => S56; konIB*pd_s*MEKERK_b_1_b_nA_0_nR_1_pd_s_1;
  R64: GBX2_b_1_b_nA_1_nR_0_stat3_s_1 => GBX2_b_b_nA_0_nR_0 + stat3_s; koffIB*GBX2_b_1_b_nA_1_nR_0_stat3_s_1;
  R65: stat3_s + GBX2_b_1_b_nA_1_nR_0_stat3_s_1 => S57; konIB*stat3_s*GBX2_b_1_b_nA_1_nR_0_stat3_s_1;
  R66: KLF4_b_1_b_nA_1_nR_0_stat3_s_1 => KLF4_b_b_nA_0_nR_0 + stat3_s; koffIB*KLF4_b_1_b_nA_1_nR_0_stat3_s_1;
  R67: stat3_s + KLF4_b_1_b_nA_1_nR_0_stat3_s_1 => S58; konIB*stat3_s*KLF4_b_1_b_nA_1_nR_0_stat3_s_1;
  R68: stat3_s + KLF4_b_1_b_nA_1_nR_0_gbx2_s_1 => S59; konIB*stat3_s*KLF4_b_1_b_nA_1_nR_0_gbx2_s_1;
  R69: stat3_s + TFCP2L1_b_1_b_nA_0_nR_1_tcf3_s_1 => S60; konIB*stat3_s*TFCP2L1_b_1_b_nA_0_nR_1_tcf3_s_1;
  R70: stat3_s + TFCP2L1_b_1_b_nA_0_nR_1_oct4_s_1 => S61; konIB*stat3_s*TFCP2L1_b_1_b_nA_0_nR_1_oct4_s_1;
  R71: S33 => TFCP2L1_b_b_nA_0_nR_0 + stat3_s; koffIB*S33;
  R72: stat3_s + S33 => S62; konIB*stat3_s*S33;
  R73: stat3_s + TFCP2L1_b_1_b_nA_1_nR_0_klf4_s_1 => S63; konIB*stat3_s*TFCP2L1_b_1_b_nA_1_nR_0_klf4_s_1;
  R74: KLF4_b_1_b_nA_1_nR_0_gbx2_s_1 => KLF4_b_b_nA_0_nR_0 + gbx2_s; koffIB*KLF4_b_1_b_nA_1_nR_0_gbx2_s_1;
  R75: gbx2_s + KLF4_b_1_b_nA_1_nR_0_stat3_s_1 => S59; konIB*gbx2_s*KLF4_b_1_b_nA_1_nR_0_stat3_s_1;
  R76: gbx2_s + KLF4_b_1_b_nA_1_nR_0_gbx2_s_1 => S64; konIB*gbx2_s*KLF4_b_1_b_nA_1_nR_0_gbx2_s_1;
  R77: KLF2_b_1_b_nA_1_nR_0_klf4_s_1 => KLF2_b_b_nA_0_nR_0 + klf4_s; koffIB*KLF2_b_1_b_nA_1_nR_0_klf4_s_1;
  R78: klf4_s + KLF2_b_1_b_nA_1_nR_0_klf4_s_1 => S65; konIB*klf4_s*KLF2_b_1_b_nA_1_nR_0_klf4_s_1;
  R79: klf4_s + KLF2_b_1_b_nA_1_nR_0_sall4_s_1 => S66; konIB*klf4_s*KLF2_b_1_b_nA_1_nR_0_sall4_s_1;
  R80: S36 => SALL4_b_b_nA_0_nR_0 + tfcp2l1_s; koffIB*S36;
  R81: tfcp2l1_s + S36 => S67; konIB*tfcp2l1_s*S36;
  R82: KLF2_b_1_b_nA_1_nR_0_sall4_s_1 => KLF2_b_b_nA_0_nR_0 + sall4_s; koffIB*KLF2_b_1_b_nA_1_nR_0_sall4_s_1;
  R83: sall4_s + KLF2_b_1_b_nA_1_nR_0_klf4_s_1 => S66; konIB*sall4_s*KLF2_b_1_b_nA_1_nR_0_klf4_s_1;
  R84: sall4_s + KLF2_b_1_b_nA_1_nR_0_sall4_s_1 => S68; konIB*sall4_s*KLF2_b_1_b_nA_1_nR_0_sall4_s_1;
  R85: klf2_s + OCT4_b_1_b_nA_0_nR_1_esrrb_s_1 => S69; konIB*klf2_s*OCT4_b_1_b_nA_0_nR_1_esrrb_s_1;
  R86: OCT4_b_1_b_nA_1_nR_0_klf2_s_1 => OCT4_b_b_nA_0_nR_0 + klf2_s; koffIB*OCT4_b_1_b_nA_1_nR_0_klf2_s_1;
  R87: klf2_s + OCT4_b_1_b_nA_1_nR_0_klf2_s_1 => S70; konIB*klf2_s*OCT4_b_1_b_nA_1_nR_0_klf2_s_1;
  R88: klf2_s + OCT4_b_1_b_nA_1_nR_0_sox2_s_1 => S71; konIB*klf2_s*OCT4_b_1_b_nA_1_nR_0_sox2_s_1;
  R89: klf4_s + TFCP2L1_b_1_b_nA_0_nR_1_tcf3_s_1 => S72; konIB*klf4_s*TFCP2L1_b_1_b_nA_0_nR_1_tcf3_s_1;
  R90: klf4_s + TFCP2L1_b_1_b_nA_0_nR_1_oct4_s_1 => S73; konIB*klf4_s*TFCP2L1_b_1_b_nA_0_nR_1_oct4_s_1;
  R91: TFCP2L1_b_1_b_nA_1_nR_0_klf4_s_1 => TFCP2L1_b_b_nA_0_nR_0 + klf4_s; koffIB*TFCP2L1_b_1_b_nA_1_nR_0_klf4_s_1;
  R92: klf4_s + S33 => S63; konIB*klf4_s*S33;
  R93: klf4_s + TFCP2L1_b_1_b_nA_1_nR_0_klf4_s_1 => S74; konIB*klf4_s*TFCP2L1_b_1_b_nA_1_nR_0_klf4_s_1;
  R94: klf2_s + NANOG_b_1_b_nA_0_nR_1_mekerk_s_1 => S75; konIB*klf2_s*NANOG_b_1_b_nA_0_nR_1_mekerk_s_1;
  R95: NANOG_b_1_b_nA_1_nR_0_klf2_s_1 => NANOG_b_b_nA_0_nR_0 + klf2_s; koffIB*NANOG_b_1_b_nA_1_nR_0_klf2_s_1;
  R96: klf2_s + NANOG_b_1_b_nA_1_nR_0_klf2_s_1 => S76; konIB*klf2_s*NANOG_b_1_b_nA_1_nR_0_klf2_s_1;
  R97: klf2_s + NANOG_b_1_b_nA_1_nR_0_oct4_s_1 => S77; konIB*klf2_s*NANOG_b_1_b_nA_1_nR_0_oct4_s_1;
  R98: SOX2_b_1_b_nA_1_nR_0_sall4_s_1 => SOX2_b_b_nA_0_nR_0 + sall4_s; koffIB*SOX2_b_1_b_nA_1_nR_0_sall4_s_1;
  R99: sall4_s + SOX2_b_1_b_nA_1_nR_0_sall4_s_1 => S78; konIB*sall4_s*SOX2_b_1_b_nA_1_nR_0_sall4_s_1;
  R100: sall4_s + SOX2_b_1_b_nA_1_nR_0_nanog_s_1 => S79; konIB*sall4_s*SOX2_b_1_b_nA_1_nR_0_nanog_s_1;
  R101: sox2_s + OCT4_b_1_b_nA_0_nR_1_esrrb_s_1 => S80; konIB*sox2_s*OCT4_b_1_b_nA_0_nR_1_esrrb_s_1;
  R102: OCT4_b_1_b_nA_1_nR_0_sox2_s_1 => OCT4_b_b_nA_0_nR_0 + sox2_s; koffIB*OCT4_b_1_b_nA_1_nR_0_sox2_s_1;
  R103: sox2_s + OCT4_b_1_b_nA_1_nR_0_klf2_s_1 => S71; konIB*sox2_s*OCT4_b_1_b_nA_1_nR_0_klf2_s_1;
  R104: sox2_s + OCT4_b_1_b_nA_1_nR_0_sox2_s_1 => S81; konIB*sox2_s*OCT4_b_1_b_nA_1_nR_0_sox2_s_1;
  R105: oct4_s + NANOG_b_1_b_nA_0_nR_1_mekerk_s_1 => S82; konIB*oct4_s*NANOG_b_1_b_nA_0_nR_1_mekerk_s_1;
  R106: NANOG_b_1_b_nA_1_nR_0_oct4_s_1 => NANOG_b_b_nA_0_nR_0 + oct4_s; koffIB*NANOG_b_1_b_nA_1_nR_0_oct4_s_1;
  R107: oct4_s + NANOG_b_1_b_nA_1_nR_0_klf2_s_1 => S77; konIB*oct4_s*NANOG_b_1_b_nA_1_nR_0_klf2_s_1;
  R108: oct4_s + NANOG_b_1_b_nA_1_nR_0_oct4_s_1 => S83; konIB*oct4_s*NANOG_b_1_b_nA_1_nR_0_oct4_s_1;
  R109: nanog_s + ESRRB_b_1_b_nA_0_nR_1_tcf3_s_1 => S84; konIB*nanog_s*ESRRB_b_1_b_nA_0_nR_1_tcf3_s_1;
  R110: ESRRB_b_1_b_nA_1_nR_0_nanog_s_1 => ESRRB_b_b_nA_0_nR_0 + nanog_s; koffIB*ESRRB_b_1_b_nA_1_nR_0_nanog_s_1;
  R111: nanog_s + ESRRB_b_1_b_nA_1_nR_0_nanog_s_1 => S85; konIB*nanog_s*ESRRB_b_1_b_nA_1_nR_0_nanog_s_1;
  R112: nanog_s + S46 => S86; konIB*nanog_s*S46;
  R113: SOX2_b_1_b_nA_1_nR_0_nanog_s_1 => SOX2_b_b_nA_0_nR_0 + nanog_s; koffIB*SOX2_b_1_b_nA_1_nR_0_nanog_s_1;
  R114: nanog_s + SOX2_b_1_b_nA_1_nR_0_sall4_s_1 => S79; konIB*nanog_s*SOX2_b_1_b_nA_1_nR_0_sall4_s_1;
  R115: nanog_s + SOX2_b_1_b_nA_1_nR_0_nanog_s_1 => S87; konIB*nanog_s*SOX2_b_1_b_nA_1_nR_0_nanog_s_1;
  R116: esrrb_s + TFCP2L1_b_1_b_nA_0_nR_1_tcf3_s_1 => S60; konIB*esrrb_s*TFCP2L1_b_1_b_nA_0_nR_1_tcf3_s_1;
  R117: esrrb_s + TFCP2L1_b_1_b_nA_0_nR_1_oct4_s_1 => S61; konIB*esrrb_s*TFCP2L1_b_1_b_nA_0_nR_1_oct4_s_1;
  R118: S33 => TFCP2L1_b_b_nA_0_nR_0 + esrrb_s; koffIB*S33;
  R119: esrrb_s + S33 => S62; konIB*esrrb_s*S33;
  R120: esrrb_s + TFCP2L1_b_1_b_nA_1_nR_0_klf4_s_1 => S63; konIB*esrrb_s*TFCP2L1_b_1_b_nA_1_nR_0_klf4_s_1;
  R121: tfcp2l1_s + ESRRB_b_1_b_nA_0_nR_1_tcf3_s_1 => S88; konIB*tfcp2l1_s*ESRRB_b_1_b_nA_0_nR_1_tcf3_s_1;
  R122: S46 => ESRRB_b_b_nA_0_nR_0 + tfcp2l1_s; koffIB*S46;
  R123: tfcp2l1_s + ESRRB_b_1_b_nA_1_nR_0_nanog_s_1 => S86; konIB*tfcp2l1_s*ESRRB_b_1_b_nA_1_nR_0_nanog_s_1;
  R124: tfcp2l1_s + S46 => S89; konIB*tfcp2l1_s*S46;
  R125: TCF3_b_1_b_nA_0_nR_1_mekerk_s_1 => TCF3_b_b_nA_0_nR_0 + mekerk_s; koffIB*TCF3_b_1_b_nA_0_nR_1_mekerk_s_1;
  R126: mekerk_s + TCF3_b_1_b_nA_0_nR_1_ch_s_1 => S55; konIB*mekerk_s*TCF3_b_1_b_nA_0_nR_1_ch_s_1;
  R127: mekerk_s + TCF3_b_1_b_nA_0_nR_1_mekerk_s_1 => S90; konIB*mekerk_s*TCF3_b_1_b_nA_0_nR_1_mekerk_s_1;
  R128: mekerk_s + NANOG_b_1_b_nA_1_nR_0_klf2_s_1 => S75; konIB*mekerk_s*NANOG_b_1_b_nA_1_nR_0_klf2_s_1;
  R129: mekerk_s + NANOG_b_1_b_nA_1_nR_0_oct4_s_1 => S82; konIB*mekerk_s*NANOG_b_1_b_nA_1_nR_0_oct4_s_1;
  R130: NANOG_b_1_b_nA_0_nR_1_mekerk_s_1 => NANOG_b_b_nA_0_nR_0 + mekerk_s; koffIB*NANOG_b_1_b_nA_0_nR_1_mekerk_s_1;
  R131: mekerk_s + NANOG_b_1_b_nA_0_nR_1_mekerk_s_1 => S91; konIB*mekerk_s*NANOG_b_1_b_nA_0_nR_1_mekerk_s_1;
  R132: tcf3_s + S33 => S60; konIB*tcf3_s*S33;
  R133: tcf3_s + TFCP2L1_b_1_b_nA_1_nR_0_klf4_s_1 => S72; konIB*tcf3_s*TFCP2L1_b_1_b_nA_1_nR_0_klf4_s_1;
  R134: TFCP2L1_b_1_b_nA_0_nR_1_tcf3_s_1 => TFCP2L1_b_b_nA_0_nR_0 + tcf3_s; koffIB*TFCP2L1_b_1_b_nA_0_nR_1_tcf3_s_1;
  R135: tcf3_s + TFCP2L1_b_1_b_nA_0_nR_1_tcf3_s_1 => S92; konIB*tcf3_s*TFCP2L1_b_1_b_nA_0_nR_1_tcf3_s_1;
  R136: tcf3_s + TFCP2L1_b_1_b_nA_0_nR_1_oct4_s_1 => S93; konIB*tcf3_s*TFCP2L1_b_1_b_nA_0_nR_1_oct4_s_1;
  R137: tcf3_s + ESRRB_b_1_b_nA_1_nR_0_nanog_s_1 => S84; konIB*tcf3_s*ESRRB_b_1_b_nA_1_nR_0_nanog_s_1;
  R138: tcf3_s + S46 => S88; konIB*tcf3_s*S46;
  R139: ESRRB_b_1_b_nA_0_nR_1_tcf3_s_1 => ESRRB_b_b_nA_0_nR_0 + tcf3_s; koffIB*ESRRB_b_1_b_nA_0_nR_1_tcf3_s_1;
  R140: tcf3_s + ESRRB_b_1_b_nA_0_nR_1_tcf3_s_1 => S94; konIB*tcf3_s*ESRRB_b_1_b_nA_0_nR_1_tcf3_s_1;
  R141: esrrb_s + OCT4_b_1_b_nA_1_nR_0_klf2_s_1 => S69; konIB*esrrb_s*OCT4_b_1_b_nA_1_nR_0_klf2_s_1;
  R142: esrrb_s + OCT4_b_1_b_nA_1_nR_0_sox2_s_1 => S80; konIB*esrrb_s*OCT4_b_1_b_nA_1_nR_0_sox2_s_1;
  R143: OCT4_b_1_b_nA_0_nR_1_esrrb_s_1 => OCT4_b_b_nA_0_nR_0 + esrrb_s; koffIB*OCT4_b_1_b_nA_0_nR_1_esrrb_s_1;
  R144: esrrb_s + OCT4_b_1_b_nA_0_nR_1_esrrb_s_1 => S95; konIB*esrrb_s*OCT4_b_1_b_nA_0_nR_1_esrrb_s_1;
  R145: oct4_s + S33 => S61; konIB*oct4_s*S33;
  R146: oct4_s + TFCP2L1_b_1_b_nA_1_nR_0_klf4_s_1 => S73; konIB*oct4_s*TFCP2L1_b_1_b_nA_1_nR_0_klf4_s_1;
  R147: TFCP2L1_b_1_b_nA_0_nR_1_oct4_s_1 => TFCP2L1_b_b_nA_0_nR_0 + oct4_s; koffIB*TFCP2L1_b_1_b_nA_0_nR_1_oct4_s_1;
  R148: oct4_s + TFCP2L1_b_1_b_nA_0_nR_1_tcf3_s_1 => S93; konIB*oct4_s*TFCP2L1_b_1_b_nA_0_nR_1_tcf3_s_1;
  R149: oct4_s + TFCP2L1_b_1_b_nA_0_nR_1_oct4_s_1 => S96; konIB*oct4_s*TFCP2L1_b_1_b_nA_0_nR_1_oct4_s_1;
  R150: STAT3_b_1_b_nA_1_nR_0_lif_s_1 => stat3_s + STAT3_b_1_b_nA_1_nR_0_lif_s_1; _rateLaw1*STAT3_b_1_b_nA_1_nR_0_lif_s_1;
  R151: GBX2_b_1_b_nA_1_nR_0_stat3_s_1 => gbx2_s + GBX2_b_1_b_nA_1_nR_0_stat3_s_1; _rateLaw3*GBX2_b_1_b_nA_1_nR_0_stat3_s_1;
  R152: KLF4_b_1_b_nA_1_nR_0_stat3_s_1 => klf4_s + KLF4_b_1_b_nA_1_nR_0_stat3_s_1; _rateLaw5*KLF4_b_1_b_nA_1_nR_0_stat3_s_1;
  R153: KLF4_b_1_b_nA_1_nR_0_gbx2_s_1 => klf4_s + KLF4_b_1_b_nA_1_nR_0_gbx2_s_1; _rateLaw5*KLF4_b_1_b_nA_1_nR_0_gbx2_s_1;
  R154: KLF2_b_1_b_nA_1_nR_0_klf4_s_1 => klf2_s + KLF2_b_1_b_nA_1_nR_0_klf4_s_1; _rateLaw7*KLF2_b_1_b_nA_1_nR_0_klf4_s_1;
  R155: KLF2_b_1_b_nA_1_nR_0_sall4_s_1 => klf2_s + KLF2_b_1_b_nA_1_nR_0_sall4_s_1; _rateLaw7*KLF2_b_1_b_nA_1_nR_0_sall4_s_1;
  R156: S36 => sall4_s + S36; _rateLaw9*S36;
  R157: SOX2_b_1_b_nA_1_nR_0_sall4_s_1 => sox2_s + SOX2_b_1_b_nA_1_nR_0_sall4_s_1; _rateLaw11*SOX2_b_1_b_nA_1_nR_0_sall4_s_1;
  R158: SOX2_b_1_b_nA_1_nR_0_nanog_s_1 => sox2_s + SOX2_b_1_b_nA_1_nR_0_nanog_s_1; _rateLaw11*SOX2_b_1_b_nA_1_nR_0_nanog_s_1;
  R159: TCF3_b_1_b_nA_0_nR_1_ch_s_1 => tcf3_s + TCF3_b_1_b_nA_0_nR_1_ch_s_1; alphamaxIB*TCF3_b_1_b_nA_0_nR_1_ch_s_1;
  R160: TCF3_b_1_b_nA_0_nR_1_mekerk_s_1 => tcf3_s + TCF3_b_1_b_nA_0_nR_1_mekerk_s_1; alphamaxIB*TCF3_b_1_b_nA_0_nR_1_mekerk_s_1;
  R161: MEKERK_b_1_b_nA_0_nR_1_pd_s_1 => mekerk_s + MEKERK_b_1_b_nA_0_nR_1_pd_s_1; alphamaxIB*MEKERK_b_1_b_nA_0_nR_1_pd_s_1;
  R162: OCT4_b_1_b_nA_1_nR_0_klf2_s_1 => oct4_s + OCT4_b_1_b_nA_1_nR_0_klf2_s_1; alphamIB*OCT4_b_1_b_nA_1_nR_0_klf2_s_1;
  R163: OCT4_b_1_b_nA_1_nR_0_sox2_s_1 => oct4_s + OCT4_b_1_b_nA_1_nR_0_sox2_s_1; alphamIB*OCT4_b_1_b_nA_1_nR_0_sox2_s_1;
  R164: OCT4_b_1_b_nA_0_nR_1_esrrb_s_1 => oct4_s + OCT4_b_1_b_nA_0_nR_1_esrrb_s_1; alphamIB*OCT4_b_1_b_nA_0_nR_1_esrrb_s_1;
  R165: S33 => tfcp2l1_s + S33; alphamIB*S33;
  R166: TFCP2L1_b_1_b_nA_1_nR_0_klf4_s_1 => tfcp2l1_s + TFCP2L1_b_1_b_nA_1_nR_0_klf4_s_1; alphamIB*TFCP2L1_b_1_b_nA_1_nR_0_klf4_s_1;
  R167: TFCP2L1_b_1_b_nA_0_nR_1_tcf3_s_1 => tfcp2l1_s + TFCP2L1_b_1_b_nA_0_nR_1_tcf3_s_1; alphamIB*TFCP2L1_b_1_b_nA_0_nR_1_tcf3_s_1;
  R168: TFCP2L1_b_1_b_nA_0_nR_1_oct4_s_1 => tfcp2l1_s + TFCP2L1_b_1_b_nA_0_nR_1_oct4_s_1; alphamIB*TFCP2L1_b_1_b_nA_0_nR_1_oct4_s_1;
  R169: ESRRB_b_1_b_nA_1_nR_0_nanog_s_1 => esrrb_s + ESRRB_b_1_b_nA_1_nR_0_nanog_s_1; alphamIB*ESRRB_b_1_b_nA_1_nR_0_nanog_s_1;
  R170: S46 => esrrb_s + S46; alphamIB*S46;
  R171: ESRRB_b_1_b_nA_0_nR_1_tcf3_s_1 => esrrb_s + ESRRB_b_1_b_nA_0_nR_1_tcf3_s_1; alphamIB*ESRRB_b_1_b_nA_0_nR_1_tcf3_s_1;
  R172: NANOG_b_1_b_nA_1_nR_0_klf2_s_1 => nanog_s + NANOG_b_1_b_nA_1_nR_0_klf2_s_1; alphamIB*NANOG_b_1_b_nA_1_nR_0_klf2_s_1;
  R173: NANOG_b_1_b_nA_1_nR_0_oct4_s_1 => nanog_s + NANOG_b_1_b_nA_1_nR_0_oct4_s_1; alphamIB*NANOG_b_1_b_nA_1_nR_0_oct4_s_1;
  R174: NANOG_b_1_b_nA_0_nR_1_mekerk_s_1 => nanog_s + NANOG_b_1_b_nA_0_nR_1_mekerk_s_1; alphamIB*NANOG_b_1_b_nA_0_nR_1_mekerk_s_1;
  R175: S53 => lif_s + STAT3_b_1_b_nA_1_nR_0_lif_s_1; 2*koffIB*S53;
  R176: S54 => ch_s + TCF3_b_1_b_nA_0_nR_1_ch_s_1; 2*koffIB*S54;
  R177: S55 => ch_s + TCF3_b_1_b_nA_0_nR_1_mekerk_s_1; koffIB*S55;
  R178: S56 => pd_s + MEKERK_b_1_b_nA_0_nR_1_pd_s_1; 2*koffIB*S56;
  R179: S57 => stat3_s + GBX2_b_1_b_nA_1_nR_0_stat3_s_1; 2*koffIB*S57;
  R180: S58 => stat3_s + KLF4_b_1_b_nA_1_nR_0_stat3_s_1; 2*koffIB*S58;
  R181: S59 => stat3_s + KLF4_b_1_b_nA_1_nR_0_gbx2_s_1; koffIB*S59;
  R182: S60 => stat3_s + TFCP2L1_b_1_b_nA_0_nR_1_tcf3_s_1; koffIB*S60;
  R183: S61 => stat3_s + TFCP2L1_b_1_b_nA_0_nR_1_oct4_s_1; koffIB*S61;
  R184: S62 => stat3_s + S33; 2*koffIB*S62;
  R185: S63 => stat3_s + TFCP2L1_b_1_b_nA_1_nR_0_klf4_s_1; koffIB*S63;
  R186: S59 => gbx2_s + KLF4_b_1_b_nA_1_nR_0_stat3_s_1; koffIB*S59;
  R187: S64 => gbx2_s + KLF4_b_1_b_nA_1_nR_0_gbx2_s_1; 2*koffIB*S64;
  R188: S65 => klf4_s + KLF2_b_1_b_nA_1_nR_0_klf4_s_1; 2*koffIB*S65;
  R189: S66 => klf4_s + KLF2_b_1_b_nA_1_nR_0_sall4_s_1; koffIB*S66;
  R190: S67 => tfcp2l1_s + S36; 2*koffIB*S67;
  R191: S66 => sall4_s + KLF2_b_1_b_nA_1_nR_0_klf4_s_1; koffIB*S66;
  R192: S68 => sall4_s + KLF2_b_1_b_nA_1_nR_0_sall4_s_1; 2*koffIB*S68;
  R193: S69 => klf2_s + OCT4_b_1_b_nA_0_nR_1_esrrb_s_1; koffIB*S69;
  R194: S70 => klf2_s + OCT4_b_1_b_nA_1_nR_0_klf2_s_1; 2*koffIB*S70;
  R195: S71 => klf2_s + OCT4_b_1_b_nA_1_nR_0_sox2_s_1; koffIB*S71;
  R196: S72 => klf4_s + TFCP2L1_b_1_b_nA_0_nR_1_tcf3_s_1; koffIB*S72;
  R197: S73 => klf4_s + TFCP2L1_b_1_b_nA_0_nR_1_oct4_s_1; koffIB*S73;
  R198: S63 => klf4_s + S33; koffIB*S63;
  R199: S74 => klf4_s + TFCP2L1_b_1_b_nA_1_nR_0_klf4_s_1; 2*koffIB*S74;
  R200: S75 => klf2_s + NANOG_b_1_b_nA_0_nR_1_mekerk_s_1; koffIB*S75;
  R201: S76 => klf2_s + NANOG_b_1_b_nA_1_nR_0_klf2_s_1; 2*koffIB*S76;
  R202: S77 => klf2_s + NANOG_b_1_b_nA_1_nR_0_oct4_s_1; koffIB*S77;
  R203: S78 => sall4_s + SOX2_b_1_b_nA_1_nR_0_sall4_s_1; 2*koffIB*S78;
  R204: S79 => sall4_s + SOX2_b_1_b_nA_1_nR_0_nanog_s_1; koffIB*S79;
  R205: S80 => sox2_s + OCT4_b_1_b_nA_0_nR_1_esrrb_s_1; koffIB*S80;
  R206: S71 => sox2_s + OCT4_b_1_b_nA_1_nR_0_klf2_s_1; koffIB*S71;
  R207: S81 => sox2_s + OCT4_b_1_b_nA_1_nR_0_sox2_s_1; 2*koffIB*S81;
  R208: S82 => oct4_s + NANOG_b_1_b_nA_0_nR_1_mekerk_s_1; koffIB*S82;
  R209: S77 => oct4_s + NANOG_b_1_b_nA_1_nR_0_klf2_s_1; koffIB*S77;
  R210: S83 => oct4_s + NANOG_b_1_b_nA_1_nR_0_oct4_s_1; 2*koffIB*S83;
  R211: S84 => nanog_s + ESRRB_b_1_b_nA_0_nR_1_tcf3_s_1; koffIB*S84;
  R212: S85 => nanog_s + ESRRB_b_1_b_nA_1_nR_0_nanog_s_1; 2*koffIB*S85;
  R213: S86 => nanog_s + S46; koffIB*S86;
  R214: S79 => nanog_s + SOX2_b_1_b_nA_1_nR_0_sall4_s_1; koffIB*S79;
  R215: S87 => nanog_s + SOX2_b_1_b_nA_1_nR_0_nanog_s_1; 2*koffIB*S87;
  R216: S60 => esrrb_s + TFCP2L1_b_1_b_nA_0_nR_1_tcf3_s_1; koffIB*S60;
  R217: S61 => esrrb_s + TFCP2L1_b_1_b_nA_0_nR_1_oct4_s_1; koffIB*S61;
  R218: S62 => esrrb_s + S33; 2*koffIB*S62;
  R219: S63 => esrrb_s + TFCP2L1_b_1_b_nA_1_nR_0_klf4_s_1; koffIB*S63;
  R220: S88 => tfcp2l1_s + ESRRB_b_1_b_nA_0_nR_1_tcf3_s_1; koffIB*S88;
  R221: S86 => tfcp2l1_s + ESRRB_b_1_b_nA_1_nR_0_nanog_s_1; koffIB*S86;
  R222: S89 => tfcp2l1_s + S46; 2*koffIB*S89;
  R223: S55 => mekerk_s + TCF3_b_1_b_nA_0_nR_1_ch_s_1; koffIB*S55;
  R224: S90 => mekerk_s + TCF3_b_1_b_nA_0_nR_1_mekerk_s_1; 2*koffIB*S90;
  R225: S75 => mekerk_s + NANOG_b_1_b_nA_1_nR_0_klf2_s_1; koffIB*S75;
  R226: S82 => mekerk_s + NANOG_b_1_b_nA_1_nR_0_oct4_s_1; koffIB*S82;
  R227: S91 => mekerk_s + NANOG_b_1_b_nA_0_nR_1_mekerk_s_1; 2*koffIB*S91;
  R228: S60 => tcf3_s + S33; koffIB*S60;
  R229: S72 => tcf3_s + TFCP2L1_b_1_b_nA_1_nR_0_klf4_s_1; koffIB*S72;
  R230: S92 => tcf3_s + TFCP2L1_b_1_b_nA_0_nR_1_tcf3_s_1; 2*koffIB*S92;
  R231: S93 => tcf3_s + TFCP2L1_b_1_b_nA_0_nR_1_oct4_s_1; koffIB*S93;
  R232: S84 => tcf3_s + ESRRB_b_1_b_nA_1_nR_0_nanog_s_1; koffIB*S84;
  R233: S88 => tcf3_s + S46; koffIB*S88;
  R234: S94 => tcf3_s + ESRRB_b_1_b_nA_0_nR_1_tcf3_s_1; 2*koffIB*S94;
  R235: S69 => esrrb_s + OCT4_b_1_b_nA_1_nR_0_klf2_s_1; koffIB*S69;
  R236: S80 => esrrb_s + OCT4_b_1_b_nA_1_nR_0_sox2_s_1; koffIB*S80;
  R237: S95 => esrrb_s + OCT4_b_1_b_nA_0_nR_1_esrrb_s_1; 2*koffIB*S95;
  R238: S61 => oct4_s + S33; koffIB*S61;
  R239: S73 => oct4_s + TFCP2L1_b_1_b_nA_1_nR_0_klf4_s_1; koffIB*S73;
  R240: S93 => oct4_s + TFCP2L1_b_1_b_nA_0_nR_1_tcf3_s_1; koffIB*S93;
  R241: S96 => oct4_s + TFCP2L1_b_1_b_nA_0_nR_1_oct4_s_1; 2*koffIB*S96;
  R242: S53 => stat3_s + S53; alphamaxIB*S53;
  R243: S57 => gbx2_s + S57; alphamaxIB*S57;
  R244: S58 => klf4_s + S58; alphamaxIB*S58;
  R245: S59 => klf4_s + S59; alphamaxIB*S59;
  R246: S64 => klf4_s + S64; alphamaxIB*S64;
  R247: S65 => klf2_s + S65; alphamaxIB*S65;
  R248: S66 => klf2_s + S66; alphamaxIB*S66;
  R249: S68 => klf2_s + S68; alphamaxIB*S68;
  R250: S67 => sall4_s + S67; alphamaxIB*S67;
  R251: S78 => sox2_s + S78; alphamaxIB*S78;
  R252: S79 => sox2_s + S79; alphamaxIB*S79;
  R253: S87 => sox2_s + S87; alphamaxIB*S87;
  R254: S54 => tcf3_s + S54; _rateLaw13*S54;
  R255: S55 => tcf3_s + S55; _rateLaw13*S55;
  R256: S90 => tcf3_s + S90; _rateLaw13*S90;
  R257: S56 => mekerk_s + S56; _rateLaw14*S56;
  R258: S70 => oct4_s + S70; alphamaxIB*S70;
  R259: S71 => oct4_s + S71; alphamaxIB*S71;
  R260: S81 => oct4_s + S81; alphamaxIB*S81;
  R261: S95 => oct4_s + S95; _rateLaw15*S95;
  R262: S69 => oct4_s + S69; alphamIB*S69;
  R263: S80 => oct4_s + S80; alphamIB*S80;
  R264: S62 => tfcp2l1_s + S62; alphamaxIB*S62;
  R265: S63 => tfcp2l1_s + S63; alphamaxIB*S63;
  R266: S74 => tfcp2l1_s + S74; alphamaxIB*S74;
  R267: S92 => tfcp2l1_s + S92; _rateLaw16*S92;
  R268: S93 => tfcp2l1_s + S93; _rateLaw16*S93;
  R269: S96 => tfcp2l1_s + S96; _rateLaw16*S96;
  R270: S60 => tfcp2l1_s + S60; alphamIB*S60;
  R271: S61 => tfcp2l1_s + S61; alphamIB*S61;
  R272: S72 => tfcp2l1_s + S72; alphamIB*S72;
  R273: S73 => tfcp2l1_s + S73; alphamIB*S73;
  R274: S85 => esrrb_s + S85; alphamaxIB*S85;
  R275: S86 => esrrb_s + S86; alphamaxIB*S86;
  R276: S89 => esrrb_s + S89; alphamaxIB*S89;
  R277: S94 => esrrb_s + S94; _rateLaw17*S94;
  R278: S84 => esrrb_s + S84; alphamIB*S84;
  R279: S88 => esrrb_s + S88; alphamIB*S88;
  R280: S76 => nanog_s + S76; alphamaxIB*S76;
  R281: S77 => nanog_s + S77; alphamaxIB*S77;
  R282: S83 => nanog_s + S83; alphamaxIB*S83;
  R283: S91 => nanog_s + S91; _rateLaw18*S91;
  R284: S75 => nanog_s + S75; alphamIB*S75;
  R285: S82 => nanog_s + S82; alphamIB*S82;
end
